DAU := 27*10^6
# Расчет RPS
# Вопросы
questions_per_day_read_by_user := 10
RPS_question_create := 7000/day = 0.0810185 1/s
RPS_question_read := DAU*questions_per_day_read_by_user/day = 3125 1/s
# Ответы
answer_per_question := 5
RPS_answer_create := RPS_question_create*answer_per_question = 0.405093 1/s
RPS_answer_read := answer_per_question*RPS_question_read = 15625 1/s
# Посты
RPS_post_create := RPS_question_create = 0.0810185 1/s
RPS_post_read := RPS_question_read = 3125 1/s
# Комментарии
comments_per_post_feed := 142.1
comments_per_post_profile := 1.07
comments_per_answer := 17.4
comments_on_read := 10
RPS_comment_create := comments_per_post_feed*RPS_post_create + comments_per_answer*RPS_answer_create = 18.5613 1/s
RPS_comment_read := comments_on_read*RPS_post_read + comments_on_read*RPS_answer_read = 187500 1/s
# Оценки
votes_per_post_feed := 1823
votes_per_post_profile := 17.9
votes_per_answer := 83.7
RPS_votes_create := votes_per_post_feed*RPS_post_create + votes_per_answer*RPS_answer_create = 181.603 1/s
RPS_votes_read := RPS_post_read + RPS_answer_read = 18750 1/s
# Сообщества
# Расчет трафика
bit := 1
B := 8 bit
Kbit := 1024 bit
KB := 1024 B
Mbit := 1024 Kbit
MB := 1024 KB
GB := 1024 MB
Gbit := 1024 Mbit
TB := 1024 GB
symbol_size := 4 B
image_size := 1 MB
# Вопросы
question_symbols := 120
question_size := question_symbols*symbol_size = 480 B
question_traffic_create := question_size*RPS_question_create = 38.8889 B/s
question_traffic_read := question_size*RPS_question_read = 1.43051 MB/s
question_traffic := question_traffic_create + question_traffic_read = 1.43055 MB/s
question_traffic = 11.4444 Mbit/s
question_traffic = 120.703 GB/day
# Ответы
answer_symbols := 918
answer_images := 0.6
answer_size := answer_symbols*symbol_size + answer_images*image_size = 617.986 KB
answer_traffic_create := answer_size*RPS_answer_create = 250.342 KB/s
answer_traffic_read := answer_size*RPS_answer_read = 9.20871 GB/s
answer_traffic := answer_traffic_create + answer_traffic_read = 9.20895 GB/s
answer_traffic = 73.6716 Gbit/s
answer_traffic = 777.005 TB/day
# Посты
post_symbols := 968
post_images := 1.8
post_size := post_symbols*symbol_size + post_images*image_size = 1.80369 MB
post_traffic_create := post_size*RPS_post_create = 149.64 KB/s
post_traffic_read := post_size*RPS_post_read = 5.50443 GB/s
post_traffic := post_traffic_create + post_traffic_read = 5.50458 GB/s
post_traffic = 44.0366 Gbit/s
post_traffic = 464.449 TB/day
# Оценки
vote_size_create := 512 B
vote_size_read := 20 B
vote_traffic_create := vote_size_create*RPS_votes_create = 90.8015 KB/s
vote_traffic_read := vote_size_read*RPS_votes_read = 366.211 KB/s
vote_traffic := vote_traffic_create + vote_traffic_read = 457.012 KB/s
vote_traffic = 3.57041 Mbit/s
vote_traffic = 37.6567 GB/day
# Комментарии
comment_symbols := 87
comment_size := symbol_size*comment_symbols = 348 B
comment_traffic_create := comment_size*RPS_comment_create = 6.30796 KB/s
comment_traffic_read := comment_size*RPS_comment_read = 62.2272 MB/s
comment_traffic := comment_traffic_create + comment_traffic_read = 62.2334 MB/s
comment_traffic = 497.867 Mbit/s
comment_traffic = 5.12787 TB/day
# Расчет хранилищ
# Вопросы
question_DB_size := question_traffic_create = 1.14217 GB/(365 day)
# Ответы
answer_DB_size := answer_traffic_create = 7.35258 TB/(365 day)
# Посты
post_DB_size := post_traffic_create = 4.39495 TB/(365 day)
# Комментарии
comment_DB_size := comment_traffic_create = 189.712 GB/(365 day)
# Балансировка нагрузки
USA := 0.37
India := 0.25
Europe := 0.176
SEA := 0.06  # - Юго-восточная Азия
UnitedKingdom := 0.056
MENA := 0.05  # - Ближний Восток и Северная Африка
Canada := 0.037
ANZ := 0.027  # - Австралия
Japan := 0.017
Mexico := 0.0087
Brazil := 0.0065
# Доля пользователей по частям света
Северная_Америка := USA + Canada + Mexico = 0.4157
Азия := India + SEA + MENA + Japan = 0.377
Еврора := Europe + UnitedKingdom = 0.232
Австралия := ANZ = 0.027
Южная_Америка := Brazil = 0.0065
